# OpenSim document version 40500
Model FESCyclingModel-scaled:
  gravity: 0 -9.80665 0
  length_units: meters
  force_units: N
  credits:
    A planar reduced gait model with 10 degrees of freedom and 18 muscles by Ajay Seth. Closely based on Delp S.L., Loan J.P., Hoy M.G., Zajac F.E., Topp E.L., Rosen J.M., Thelen D.G., Anderson F.C., Seth A. Notes: 3D, 23 DOF gait model created by D.G. Thelen, Univ. of Wisconsin-Madison, and Ajay Seth, Frank C. Anderson, and Scott L. Delp, Stanford University. Lower extremity joint defintions based on Delp et al. (1990). Low back joint and anthropometry based on Anderson and Pandy (1999, 2001). Planar knee model of Yamaguchi and Zajac (1989). Seth replaced tibia translation constraints with a CustomJoint for the knee and removed the patella to eliminate all kinematic constraints; insertions of the quadrucepts are handled with moving points in the tibia frame as defined by Delp 1990. Number of muscles was reduced by Anderson to improve simulation speed for demonstrations and is not intended to be used in research. License: Creative Commons (CCBY 3.0). You are free to distribute, remix, tweak, and build upon this work, even commercially, as long as you credit us for the original creation. http://creativecommons.org/licenses/by/3.0/ More Information: http://simtk-confluence.stanford.edu:8080/display/OpenSim/Gait+2392+and+2354+Models
  publications:
    Delp, S.L., Loan, J.P., Hoy, M.G., Zajac, F.E., Topp E.L., Rosen, J.M.: An interactive graphics-based model of the lower extremity to study orthopaedic surgical procedures, IEEE Transactions on Biomedical Engineering, vol. 37, pp. 757-767, 1990. Yamaguchi G.T., Zajac F.E.: A planar model of the knee joint to characterize the knee extensor mechanism." J . Biomech. vol. 22. pp. 1-10. 1989. Anderson F.C., Pandy M.G.: A dynamic optimization solution for vertical jumping in three dimensions. Computer Methods in Biomechanics and Biomedical Engineering 2:201-231, 1999. Anderson F.C., Pandy M.G.: Dynamic optimization of human walking. Journal of Biomechanical Engineering 123:381-390, 2001.
  Ground
  BodySet:
    Body Right_Pedal: mass=0.4812687 [kg] mass_center=(0 0 0) inertia=(0.9625373 0.9625373 0.9625373 0 0 0)
        meshes=pedal.obj
    Body Left_Pedal: mass=0.4812687 mass_center=(0 0 0) inertia=(0.9625373 0.9625373 0.9625373 0 0 0) meshes=pedal.obj
    Body pelvis: mass=11.3358 mass_center=(-0.0707 0 0) inertia=(0.09894884 0.083837 0.05573091 0 0 0)
        meshes=(sacrum.vtp pelvis.vtp l_pelvis.vtp)
    Body femur_r: mass=10.18749 mass_center=(0 -0.17748 0) inertia=(0.1598456 0.04190127 0.1685601 0 0 0)
        meshes=femur_r.vtp
    Body tibia_r: mass=3.798184 mass_center=(0 -0.1906207 0) inertia=(0.05382411 0.005446487 0.05457166 0 0 0)
        meshes=(tibia_r.vtp fibula.vtp)
    Body talus_r: mass=0.09625373 mass_center=(0 0 0) inertia=(0.0009625373 0.0009625373 0.0009625373 0 0 0)
        meshes=talus.vtp
    Body calcn_r: mass=1.203172 mass_center=(0.1 0.03 0) inertia=(0.001347552 0.003753896 0.003946403 0 0 0)
        meshes=foot.vtp
    Body toes_r: mass=0.2084856 mass_center=(0.0346 0.006 -0.0175) inertia=(9.625373e-5 0.0001925075 9.625373e-5 0 0 0)
        meshes=bofoot.vtp
    Body femur_l: mass=10.18749 mass_center=(0 -0.17748 0) inertia=(0.1598456 0.04190127 0.1685601 0 0 0)
        meshes=femur_l.vtp
    Body tibia_l: mass=3.798184 mass_center=(0 -0.1906207 0) inertia=(0.05382411 0.005446487 0.05457166 0 0 0)
        meshes=(tibia_l.vtp l_fibula.vtp)
    Body talus_l: mass=0.09625373 mass_center=(0 0 0) inertia=(0.0009625373 0.0009625373 0.0009625373 0 0 0)
        meshes=l_talus.vtp
    Body calcn_l: mass=1.203172 mass_center=(0.1 0.03 0) inertia=(0.001347552 0.003753896 0.003946403 0 0 0)
        meshes=l_foot.vtp
    Body toes_l: mass=0.2084856 mass_center=(0.0346 0.006 0.0175) inertia=(9.625373e-5 0.0001925075 9.625373e-5 0 0 0)
        meshes=l_bofoot.vtp
    Body torso: mass=32.95401 mass_center=(-0.03 0.32 0) inertia=(1.419261 0.727197 1.377776 0 0 0)
        meshes=(hat_spine.vtp hat_jaw.vtp hat_skull.vtp hat_ribs.vtp)
    Body Gear: mass=1.925075 mass_center=(0 0 0) inertia=(0.9625373 0.9625373 0.9625373 0 0 0) meshes=gearSimple.obj
    Body Glasses: mass=0 mass_center=(0 0 0) inertia=(0 0 0 0 0 0) meshes=Sunglasses.obj
  JointSet:
    WeldJoint Glasses_face: socket_parent_frame=torso_offset socket_child_frame=glasses_offset
      PhysicalOffsetFrame torso_offset: socket_parent=/bodyset/torso translation=(0.01 0.544 -0.035) [meters]
          orientation=(0 1.570796 0) [radians]
      PhysicalOffsetFrame glasses_offset: socket_parent=/bodyset/Glasses translation=(0 0 0)
    WeldJoint ground_pelvis: socket_parent_frame=ground_offset socket_child_frame=pelvis_offset
      PhysicalOffsetFrame ground_offset: socket_parent=/ground translation=(-0.7 0.05 0) orientation=(0 0 0.7853982)
      PhysicalOffsetFrame pelvis_offset: socket_parent=/bodyset/pelvis translation=(0 0 0)
    PinJoint hip_r: socket_parent_frame=pelvis_offset socket_child_frame=femur_r_offset
      Coordinate hip_flexion_r: default_value=1.37546 range=(-3 3) clamped=false is_free_to_satisfy_constraints=true
      PhysicalOffsetFrame pelvis_offset: socket_parent=/bodyset/pelvis translation=(-0.0707 -0.0661 0.0835)
      PhysicalOffsetFrame femur_r_offset: socket_parent=/bodyset/femur_r translation=(0 0 0)
    CustomJoint knee_r: socket_parent_frame=femur_r_offset socket_child_frame=tibia_r_offset
      Coordinate knee_angle_r: default_value=-1.134464 range=(-3 0.1745329) clamped=true
      PhysicalOffsetFrame femur_r_offset: socket_parent=/bodyset/femur_r translation=(0 0 0)
      PhysicalOffsetFrame tibia_r_offset: socket_parent=/bodyset/tibia_r translation=(0 0 0)
      SpatialTransform: axes_held_at_zero=(rotation2 rotation3 translation3)
        TransformAxis rotation1: coordinates=knee_angle_r axis=(0 0 1) LinearFunction(coefficients=1 0)
        TransformAxis translation1: coordinates=knee_angle_r axis=(1 0 0)
          MultiplierFunction: scale=1.044
            SimmSpline: x=(-2.0944 -1.74533 -1.39626 -1.0472 -0.698132 -0.349066 -0.174533 0.197344 0.337395 0.490178 1.52146 2.0944)
                y=(-0.0032 0.00179 0.00411 0.0041 0.00212 -0.001 -0.0031 -0.005227 -0.005435 -0.005574 -0.005435 -0.00525)
        TransformAxis translation2: coordinates=knee_angle_r axis=(0 1 0)
          MultiplierFunction: scale=1.044
            SimmSpline: x=(-2.0944 -1.22173 -0.523599 -0.349066 -0.174533 0.159149 2.0944)
                y=(-0.4226 -0.4082 -0.399 -0.3976 -0.3966 -0.395264 -0.396)
    WeldJoint ankle_r: socket_parent_frame=tibia_r_offset socket_child_frame=talus_r_offset
      PhysicalOffsetFrame tibia_r_offset: socket_parent=/bodyset/tibia_r translation=(0 -0.43903 0)
      PhysicalOffsetFrame talus_r_offset: socket_parent=/bodyset/talus_r translation=(0 0.07 0)
    WeldJoint subtalar_r: socket_parent_frame=talus_r_offset socket_child_frame=calcn_r_offset
      PhysicalOffsetFrame talus_r_offset: socket_parent=/bodyset/talus_r translation=(-0.04877 -0.04195 0.00792)
      PhysicalOffsetFrame calcn_r_offset: socket_parent=/bodyset/calcn_r translation=(0 0 0)
    WeldJoint Foot_pedal_r: socket_parent_frame=Right_Pedal_offset socket_child_frame=calcn_r_offset
      PhysicalOffsetFrame Right_Pedal_offset: socket_parent=/bodyset/Right_Pedal translation=(0 0 0)
      PhysicalOffsetFrame calcn_r_offset: socket_parent=/bodyset/calcn_r translation=(0.07 -0.02 0)
    WeldJoint mtp_r: socket_parent_frame=calcn_r_offset socket_child_frame=toes_r_offset
      PhysicalOffsetFrame calcn_r_offset: socket_parent=/bodyset/calcn_r translation=(0.1788 -0.002 0.00108)
      PhysicalOffsetFrame toes_r_offset: socket_parent=/bodyset/toes_r translation=(0 0 0)
    PinJoint hip_l: socket_parent_frame=pelvis_offset socket_child_frame=femur_l_offset
      Coordinate hip_flexion_l: default_value=2.14807 range=(-3 3) clamped=false is_free_to_satisfy_constraints=true
      PhysicalOffsetFrame pelvis_offset: socket_parent=/bodyset/pelvis translation=(-0.0707 -0.0661 -0.0835)
      PhysicalOffsetFrame femur_l_offset: socket_parent=/bodyset/femur_l translation=(0 0 0)
    CustomJoint knee_l: socket_parent_frame=femur_l_offset socket_child_frame=tibia_l_offset
      Coordinate knee_angle_l: default_value=-1.909342 range=(-3 0.1745329) clamped=false
          is_free_to_satisfy_constraints=true
      PhysicalOffsetFrame femur_l_offset: socket_parent=/bodyset/femur_l translation=(0 0 0)
      PhysicalOffsetFrame tibia_l_offset: socket_parent=/bodyset/tibia_l translation=(0 0 0)
      SpatialTransform: axes_held_at_zero=(rotation2 rotation3 translation3)
        TransformAxis rotation1: coordinates=knee_angle_l axis=(0 0 1) LinearFunction(coefficients=1 0)
        TransformAxis translation1: coordinates=knee_angle_l axis=(1 0 0)
          MultiplierFunction: scale=1.044
            SimmSpline: x=(-2.0944 -1.74533 -1.39626 -1.0472 -0.698132 -0.349066 -0.174533 0.197344 0.337395 0.490178 1.52146 2.0944)
                y=(-0.0032 0.00179 0.00411 0.0041 0.00212 -0.001 -0.0031 -0.005227 -0.005435 -0.005574 -0.005435 -0.00525)
        TransformAxis translation2: coordinates=knee_angle_l axis=(0 1 0)
          MultiplierFunction: scale=1.044
            SimmSpline: x=(-2.0944 -1.22173 -0.523599 -0.349066 -0.174533 0.159149 2.0944)
                y=(-0.4226 -0.4082 -0.399 -0.3976 -0.3966 -0.395264 -0.396)
    WeldJoint ankle_l: socket_parent_frame=tibia_l_offset socket_child_frame=talus_l_offset
      PhysicalOffsetFrame tibia_l_offset: socket_parent=/bodyset/tibia_l translation=(0 -0.43903 0)
      PhysicalOffsetFrame talus_l_offset: socket_parent=/bodyset/talus_l translation=(0 0.07 0)
    WeldJoint subtalar_l: socket_parent_frame=talus_l_offset socket_child_frame=calcn_l_offset
      PhysicalOffsetFrame talus_l_offset: socket_parent=/bodyset/talus_l translation=(-0.04877 -0.04195 -0.00792)
      PhysicalOffsetFrame calcn_l_offset: socket_parent=/bodyset/calcn_l translation=(0 0 0)
    WeldJoint Foot_pedal_l: socket_parent_frame=Left_Pedal_offset socket_child_frame=calcn_l_offset
      PhysicalOffsetFrame Left_Pedal_offset: socket_parent=/bodyset/Left_Pedal translation=(0 0 0)
      PhysicalOffsetFrame calcn_l_offset: socket_parent=/bodyset/calcn_l translation=(0.07 -0.02 0)
    WeldJoint mtp_l: socket_parent_frame=calcn_l_offset socket_child_frame=toes_l_offset
      PhysicalOffsetFrame calcn_l_offset: socket_parent=/bodyset/calcn_l translation=(0.1788 -0.002 -0.00108)
      PhysicalOffsetFrame toes_l_offset: socket_parent=/bodyset/toes_l translation=(0 0 0)
    WeldJoint back: socket_parent_frame=pelvis_offset socket_child_frame=torso_offset
      PhysicalOffsetFrame pelvis_offset: socket_parent=/bodyset/pelvis translation=(-0.1007 0.0815 0)
      PhysicalOffsetFrame torso_offset: socket_parent=/bodyset/torso translation=(0 0 0)
    PinJoint gearToGround: socket_parent_frame=ground_offset socket_child_frame=Gear_offset
      Coordinate gearToGround_coord_0: default_value=-2.197804 range=(-5 5) clamped=false
          is_free_to_satisfy_constraints=true
      PhysicalOffsetFrame ground_offset: socket_parent=/ground translation=(0 0 0)
      PhysicalOffsetFrame Gear_offset: socket_parent=/bodyset/Gear translation=(0 0 0)
  ConstraintSet:
    ConstantDistanceConstraint right_pedal_to_gear: socket_body_1=/bodyset/Gear socket_body_2=/bodyset/Right_Pedal
        location_body_1=(0.000112452 0.153355 0.061937) location_body_2=(0.000598655 0.000128253 -0.029483)
        constant_distance=0.001
    ConstantDistanceConstraint left_pedal_to_gear: socket_body_1=/bodyset/Gear socket_body_2=/bodyset/Left_Pedal
        location_body_1=(-0.000112452 -0.153355 -0.061937) location_body_2=(0.000598655 0.000128253 0.029483)
        constant_distance=0.001
  ForceSet:
    CoordinateActuator torque_gear: coordinate=gearToGround_coord_0 optimal_force=100
    Millard2012EquilibriumMuscle [values shared by the 18 below unless stated]: optimal_force=1
        max_contraction_velocity=10 activation_time_constant=0.01 [seconds] deactivation_time_constant=0.04 [seconds]
        minimum_activation=0.01
      ActiveForceLengthCurve: minimum_value=0
      ForceVelocityCurve: concentric_slope_at_vmax=0 concentric_slope_near_vmax=0.25 isometric_slope=5
          eccentric_slope_at_vmax=0 eccentric_slope_near_vmax=0.15 max_eccentric_velocity_force_multiplier=1.4
      FiberForceLengthCurve
      TendonForceLengthCurve
    Millard2012EquilibriumMuscle hamstrings_r: max_isometric_force=1500 optimal_fiber_length=0.1137214
        tendon_slack_length=0.340121 pennation_angle_at_optimal=0 [radians]
      PathPoint bifemlh_r-P1: pelvis (-0.12596 -0.10257 0.06944)
      PathPoint bifemlh_r-P2: tibia_r (-0.0307321 -0.036756 0.03004803)
      PathPoint bifemlh_r-P3: tibia_r (-0.0238914 -0.0574823 0.0350203)
    Millard2012EquilibriumMuscle bifemsh_r: max_isometric_force=804 optimal_fiber_length=0.1801977
        tendon_slack_length=0.09270288 pennation_angle_at_optimal=0.4014257
      PathPoint P1: femur_r (0.00522 -0.2203884 0.0244296)
      PathPoint P2: tibia_r (-0.0307321 -0.036756 0.03004803)
      PathPoint P3: tibia_r (-0.0238914 -0.0574823 0.0350203)
    Millard2012EquilibriumMuscle glut_max_r: max_isometric_force=1000 optimal_fiber_length=0.1609489
        tendon_slack_length=0.07519154 pennation_angle_at_optimal=0
      PathPoint P1: pelvis (-0.1317 0.0087 0.0462)
      PathPoint P2: pelvis (-0.1344 -0.0609 0.0813)
      PathPoint P3: femur_r (-0.04698 -0.0609696 0.0263088)
      PathPoint P4: femur_r (-0.0162864 -0.1060704 0.0437436)
    Millard2012EquilibriumMuscle iliopsoas_r: max_isometric_force=2342 optimal_fiber_length=0.09999544
        tendon_slack_length=0.1599927 pennation_angle_at_optimal=0.1396263
      PathPoint psoas_r-P1: pelvis (-0.0647 0.0887 0.0289)
      PathPoint psoas_r-P2: pelvis (-0.0238 -0.057 0.0759)
      ConditionalPathPoint psoas_r-P3: pelvis (-0.0288 -0.0805 0.0816) socket_coordinate=/jointset/hip_r/hip_flexion_r
          range=(-1.5708 0.785398) [radians]
      PathPoint psoas_r-P4: femur_r (0.0016704 -0.0529308 0.0039672)
      PathPoint psoas_r-P5: femur_r (-0.0196272 -0.0623268 0.0108576)
    Millard2012EquilibriumMuscle rect_fem_r: max_isometric_force=2000 optimal_fiber_length=0.1187341
        tendon_slack_length=0.3228733 pennation_angle_at_optimal=0.08726646
      PathPoint P1: pelvis (-0.0295 -0.0311 0.0968)
      ConditionalPathPoint P2: femur_r (0.0348696 -0.420732 0.0019836) socket_coordinate=/jointset/knee_r/knee_angle_r
          range=(4 10)
      MovingPathPoint P3: tibia_r socket_x_coordinate=/jointset/knee_r/knee_angle_r
          socket_y_coordinate=/jointset/knee_r/knee_angle_r socket_z_coordinate=/jointset/knee_r/knee_angle_r
        x_location: MultiplierFunction: scale=1.021
          SimmSpline: x=(-2.0944 -1.99997 -1.5708 -1.45752 -1.39626 -1.0472 -0.698132 -0.526391 -0.349066 -0.174533 0 0.00017453 0.00034907 0.0279253 0.0872665 0.174533 2.0944)
              y=(0.0155805 0.0179938 0.0275081 0.0296564 0.0307615 0.0365695 0.0422074 0.0450902 0.048391 0.0534299 0.0617576 0.0617669 0.0617762 0.0633083 0.066994 0.0733035 0.0573481)
        y_location: MultiplierFunction: scale=1.021
          SimmSpline: x=(-2.0944 -1.99997 -1.5708 -1.45752 -1.39626 -1.0472 -0.698132 -0.526391 -0.349066 -0.174533 0 0.00017453 0.00034907 0.0279253 0.0872665 0.174533 2.0944)
              y=(0.0234116 0.0237613 0.0251141 0.0252795 0.0253146 0.0249184 0.0242373 0.0238447 0.0234197 0.0227644 0.020984 0.0209814 0.0209788 0.0205225 0.0191754 0.0159554 -0.0673774)
        z_location: MultiplierFunction: scale=1.021
          SimmSpline: x=(-2.0944 0.1745) y=(0.0014 0.0014)
    Millard2012EquilibriumMuscle vasti_r: max_isometric_force=1000 optimal_fiber_length=0.1115527
        tendon_slack_length=0.1209356 pennation_angle_at_optimal=0.05235988
      PathPoint vas_int_r-P1: femur_r (0.030276 -0.2008656 0.032364)
      PathPoint vas_int_r-P2: femur_r (0.034974 -0.2175696 0.029754)
      ConditionalPathPoint vas_int_r-P3: femur_r (0.0358092 -0.420732 0.005742)
          socket_coordinate=/jointset/knee_r/knee_angle_r range=(-2.61799 -1.42)
      MovingPathPoint vas_int_r-P4: tibia_r socket_x_coordinate=/jointset/knee_r/knee_angle_r
          socket_y_coordinate=/jointset/knee_r/knee_angle_r socket_z_coordinate=/jointset/knee_r/knee_angle_r
        x_location: MultiplierFunction: scale=1.021
          SimmSpline: x=(-2.0944 -1.99997 -1.5708 -1.45752 -1.39626 -1.0472 -0.698132 -0.526391 -0.349066 -0.174533 0 0.00017453 0.00034907 0.0279253 0.0872665 0.174533 2.0944)
              y=(0.0082733 0.0106866 0.0202042 0.022353 0.0234583 0.0292715 0.0349465 0.037871 0.0412569 0.0465287 0.0554632 0.0554735 0.0554837 0.0571717 0.061272 0.0684368 0.0648818)
        y_location: MultiplierFunction: scale=1.021
          SimmSpline: x=(-2.0944 -1.99997 -1.5708 -1.45752 -1.39626 -1.0472 -0.698132 -0.526391 -0.349066 -0.174533 0 0.00017453 0.00034907 0.0279253 0.0872665 0.174533 2.0944)
              y=(0.025599 0.0259487 0.0273124 0.0274796 0.0275151 0.0271363 0.0265737 0.0263073 0.0261187 0.0260129 0.0252923 0.0252911 0.0252898 0.0250526 0.0242191 0.0218288 -0.0685706)
        z_location: MultiplierFunction: scale=1.021
          SimmSpline: x=(-2.0944 2.0944) y=(0.0018 0.0018)
    Millard2012EquilibriumMuscle gastroc_r: max_isometric_force=2500 optimal_fiber_length=0.09151005
        tendon_slack_length=0.3660402 pennation_angle_at_optimal=0.296706
      PathPoint med_gas_r-P1: femur_r (-0.019836 -0.4101876 -0.024534)
      ConditionalPathPoint med_gas_r-P2: femur_r (-0.03132 -0.4198968 -0.0269352)
          socket_coordinate=/jointset/knee_r/knee_angle_r range=(-0.785398 0.174533)
      PathPoint med_gas_r-P3: calcn_r (0 0.031 -0.0053)
    Millard2012EquilibriumMuscle soleus_r: max_isometric_force=5137 optimal_fiber_length=0.05079827
        tendon_slack_length=0.2539914 pennation_angle_at_optimal=0.4363323
      PathPoint P1: tibia_r (-0.0024504 -0.1565193 0.0072491)
      PathPoint P2: calcn_r (0 0.031 -0.0053)
    Millard2012EquilibriumMuscle tib_ant_r: max_isometric_force=3000 optimal_fiber_length=0.09944864
        tendon_slack_length=0.2262964 pennation_angle_at_optimal=0.08726646
      PathPoint P1: tibia_r (0.0182759 -0.1658104 0.0117415)
      PathPoint P2: tibia_r (0.0335909 -0.4033971 -0.0180717)
      PathPoint P3: calcn_r (0.1166 0.0178 -0.0305)
    Millard2012EquilibriumMuscle hamstrings_l: max_isometric_force=1500 optimal_fiber_length=0.113
        tendon_slack_length=0.3379633 pennation_angle_at_optimal=0
      PathPoint bifemlh_l-P1: pelvis (-0.12596 -0.10257 -0.06944)
      PathPoint bifemlh_l-P2: tibia_l (-0.0307321 -0.036756 -0.03004803)
      PathPoint bifemlh_l-P3: tibia_l (-0.0238914 -0.0574823 -0.0350203)
    Millard2012EquilibriumMuscle bifemsh_l: max_isometric_force=804 optimal_fiber_length=0.1798616
        tendon_slack_length=0.09252997 pennation_angle_at_optimal=0.4014257
      PathPoint P1: femur_l (0.00522 -0.2203884 -0.0244296)
      PathPoint P2: tibia_l (-0.0307321 -0.036756 -0.03004803)
      PathPoint P3: tibia_l (-0.0238914 -0.0574823 -0.0350203)
    Millard2012EquilibriumMuscle glut_max_l: max_isometric_force=1000 optimal_fiber_length=0.1602381
        tendon_slack_length=0.07485948 pennation_angle_at_optimal=0
      PathPoint P1: pelvis (-0.1317 0.0087 -0.0462)
      PathPoint P2: pelvis (-0.1344 -0.0609 -0.0813)
      PathPoint P3: femur_l (-0.04698 -0.0609696 -0.0263088)
      PathPoint P4: femur_l (-0.0162864 -0.1060704 -0.0437436)
    Millard2012EquilibriumMuscle iliopsoas_l: max_isometric_force=2342 optimal_fiber_length=0.1007774
        tendon_slack_length=0.1612439 pennation_angle_at_optimal=0.1396263
      PathPoint psoas_l-P1: pelvis (-0.0647 0.0887 -0.0289)
      PathPoint psoas_l-P2: pelvis (-0.0238 -0.057 -0.0759)
      ConditionalPathPoint psoas_l-P3: pelvis (-0.0288 -0.0805 -0.0816) socket_coordinate=/jointset/hip_l/hip_flexion_l
          range=(-0.0001 1e-5)
      PathPoint psoas_l-P4: femur_l (0.0016704 -0.0529308 -0.0039672)
      PathPoint psoas_l-P5: femur_l (-0.0196272 -0.0623268 -0.0108576)
    Millard2012EquilibriumMuscle rect_fem_l: max_isometric_force=2000 optimal_fiber_length=0.1203436
        tendon_slack_length=0.3272502 pennation_angle_at_optimal=0.08726646
      PathPoint P1: pelvis (-0.0295 -0.0311 -0.0968)
      ConditionalPathPoint P2: femur_l (0.0348696 -0.420732 -0.0019836) socket_coordinate=/jointset/knee_l/knee_angle_l
          range=(-2.61799 -1.45997)
      MovingPathPoint P3: tibia_l socket_x_coordinate=/jointset/knee_l/knee_angle_l
          socket_y_coordinate=/jointset/knee_l/knee_angle_l socket_z_coordinate=/jointset/knee_l/knee_angle_l
        x_location: MultiplierFunction: scale=1.021
          SimmSpline: x=(-2.0944 -1.99997 -1.5708 -1.45752 -1.39626 -1.0472 -0.698132 -0.526391 -0.349066 -0.174533 0 0.00017453 0.00034907 0.0279253 0.0872665 0.174533 2.0944)
              y=(0.0155805 0.0179938 0.0275081 0.0296564 0.0307615 0.0365695 0.0422074 0.0450902 0.048391 0.0534299 0.0617576 0.0617669 0.0617762 0.0633083 0.066994 0.0733035 0.0573481)
        y_location: MultiplierFunction: scale=1.021
          SimmSpline: x=(-2.0944 -1.99997 -1.5708 -1.45752 -1.39626 -1.0472 -0.698132 -0.526391 -0.349066 -0.174533 0 0.00017453 0.00034907 0.0279253 0.0872665 0.174533 2.0944)
              y=(0.0234116 0.0237613 0.0251141 0.0252795 0.0253146 0.0249184 0.0242373 0.0238447 0.0234197 0.0227644 0.020984 0.0209814 0.0209788 0.0205225 0.0191754 0.0159554 -0.0673774)
        z_location: MultiplierFunction: scale=1.021
          SimmSpline: x=(-2.0944 0.1745) y=(-0.0014 -0.0014)
    Millard2012EquilibriumMuscle vasti_l: max_isometric_force=1000 optimal_fiber_length=0.112796
        tendon_slack_length=0.1222835 pennation_angle_at_optimal=0.05235988
      PathPoint vas_int_l-P1: femur_l (0.030276 -0.2008656 -0.032364)
      PathPoint vas_int_l-P2: femur_l (0.034974 -0.2175696 -0.029754)
      ConditionalPathPoint vas_int_l-P3: femur_l (0.0358092 -0.420732 -0.005742)
          socket_coordinate=/jointset/knee_l/knee_angle_l range=(-2.61799 -1.42)
      MovingPathPoint vas_int_l-P4: tibia_l socket_x_coordinate=/jointset/knee_l/knee_angle_l
          socket_y_coordinate=/jointset/knee_l/knee_angle_l socket_z_coordinate=/jointset/knee_l/knee_angle_l
        x_location: MultiplierFunction: scale=1.021
          SimmSpline: x=(-2.0944 -1.99997 -1.5708 -1.45752 -1.39626 -1.0472 -0.698132 -0.526391 -0.349066 -0.174533 0 0.00017453 0.00034907 0.0279253 0.0872665 0.174533 2.0944)
              y=(0.0082733 0.0106866 0.0202042 0.022353 0.0234583 0.0292715 0.0349465 0.037871 0.0412569 0.0465287 0.0554632 0.0554735 0.0554837 0.0571717 0.061272 0.0684368 0.0648818)
        y_location: MultiplierFunction: scale=1.021
          SimmSpline: x=(-2.0944 -1.99997 -1.5708 -1.45752 -1.39626 -1.0472 -0.698132 -0.526391 -0.349066 -0.174533 0 0.00017453 0.00034907 0.0279253 0.0872665 0.174533 2.0944)
              y=(0.025599 0.0259487 0.0273124 0.0274796 0.0275151 0.0271363 0.0265737 0.0263073 0.0261187 0.0260129 0.0252923 0.0252911 0.0252898 0.0250526 0.0242191 0.0218288 -0.0685706)
        z_location: MultiplierFunction: scale=1.021
          SimmSpline: x=(-2.0944 2.0944) y=(-0.0018 -0.0018)
    Millard2012EquilibriumMuscle gastroc_l: max_isometric_force=2500 optimal_fiber_length=0.09121127
        tendon_slack_length=0.3648451 pennation_angle_at_optimal=0.296706
      PathPoint med_gas_l-P1: femur_l (-0.019836 -0.4101876 0.024534)
      ConditionalPathPoint med_gas_l-P2: femur_l (-0.03132 -0.4198968 0.0269352)
          socket_coordinate=/jointset/knee_l/knee_angle_l range=(-0.785398 0.174533)
      PathPoint med_gas_l-P3: calcn_l (0 0.031 0.0053)
    Millard2012EquilibriumMuscle soleus_l: max_isometric_force=5137 optimal_fiber_length=0.05079827
        tendon_slack_length=0.2539914 pennation_angle_at_optimal=0.4363323
      PathPoint P1: tibia_l (-0.0024504 -0.1565193 -0.0072491)
      PathPoint P2: calcn_l (0 0.031 0.0053)
    Millard2012EquilibriumMuscle tib_ant_l: max_isometric_force=3000 optimal_fiber_length=0.09944864
        tendon_slack_length=0.2262964 pennation_angle_at_optimal=0.08726646
      PathPoint P1: tibia_l (0.0182759 -0.1658104 -0.0117415)
      PathPoint P2: tibia_l (0.0335909 -0.4033971 0.0180717)
      PathPoint P3: calcn_l (0.1166 0.0178 0.0305)
  MarkerSet:
    Marker r_trocanter: femur_r (-0.02557779 -0.02380622 0.05964494)
    Marker r_femur_Distal: femur_r (0.01552193 -0.424906 0.03601839)
    Marker r_tibia_Prox: tibia_r (-0.004125173 -0.08645244 0.04857613)
    Marker r_tibia_Distal: tibia_r (-0.003751986 -0.4845443 0.04027084)
    Marker r_Pelvis: pelvis (-0.02715315 0.04397723 0.1322194)
    Marker L_Pelvis: pelvis (-0.0271531 0.0439772 -0.132219)
    Marker Centro_Gear: ground (0 0 0)
    Marker Centro_pelvis: ground (-0.67 -0.05 0)
    Marker Ponta_Gear_r: Gear (0.0001124516 0.153355 0.06193697)
    Marker Conect_pedal_r: Right_Pedal (0.0005986552 0.0001282526 -0.029483)
    Marker Ponta_Gear_l: Gear (-0.000112452 -0.153355 -0.061937)
    Marker Conect_pedal_l: Left_Pedal (0.000598655 0.000128253 0.029483)
  ContactGeometrySet:
    ContactMesh RPedalContact: socket_frame=/bodyset/Right_Pedal location=(0 0 0) filename=pedal.obj
    ContactMesh LPedalContact: socket_frame=/bodyset/Left_Pedal location=(0 0 0) filename=pedal.obj
